// COMSOL Multiphysics 6.4.0.293 model "FULLCELL_NFM_cycle_1C_build_only.mph"
// Generated by Java API for COMSOL 6.4. Quantitative claims are blocked while required data remain provisional.
// Outline of the model tree

Parameters
  L_an_base = 9[um]  // Anode representative-cell length [provisional geometry]
  L_sep_base = 3[um]  // Separator length [provisional geometry]
  L_ca_base = 6[um]  // Cathode representative-cell length [provisional geometry]
  W_cell_base = 9[um]
  H_cell_base = 9[um]
  L_an = L_an_base*radiusScale
  L_sep = L_sep_base*radiusScale
  L_ca = L_ca_base*radiusScale
  W_cell = W_cell_base*radiusScale
  H_cell = H_cell_base*radiusScale
  L_total = L_an+L_sep+L_ca
  A_cell = W_cell*H_cell
  Rp_pos_base = 2.5[um]
  Rp_pos = Rp_pos_base*radiusScale
  Rp_neg_large_base = 2.3[um]
  Rp_neg_small_base = 1.8[um]
  Rp_neg_large = Rp_neg_large_base*radiusScale
  Rp_neg_small = Rp_neg_small_base*radiusScale
  x_hc_1 = 0.300*L_an  // Large HC particle 1 center x
  y_hc_1 = 0.300*W_cell  // Large HC particle 1 center y
  z_hc_1 = 0.478*H_cell  // Large HC particle 1 center z
  x_hc_2 = 0.700*L_an  // Large HC particle 2 center x
  y_hc_2 = 0.700*W_cell  // Large HC particle 2 center y
  z_hc_2 = 0.522*H_cell  // Large HC particle 2 center z
  x_hc_3 = 0.244*L_an  // Small HC particle 3 center x
  y_hc_3 = 0.756*W_cell  // Small HC particle 3 center y
  z_hc_3 = 0.244*H_cell  // Small HC particle 3 center z
  x_hc_4 = 0.756*L_an  // Small HC particle 4 center x
  y_hc_4 = 0.244*W_cell  // Small HC particle 4 center y
  z_hc_4 = 0.756*H_cell  // Small HC particle 4 center z
  rho_pos = 4550[kg/m^3]
  rho_p = rho_pos
  M_formula = 111.040[g/mol]
  csmax_pos = rho_p/M_formula
  x_pos_initial = 1.0
  x_pos_final_nominal = 0.2
  x_pos_center = L_an+L_sep+L_ca/2
  y_pos_center = W_cell/2
  z_pos_center = H_cell/2
  cs0_pos = x_pos_initial*csmax_pos
  csmax_neg = 14.54[kmol/m^3]
  x_neg_initial = 0.007
  cs0_neg = x_neg_initial*csmax_neg
  Ds_pos_charge = 1.08e-13[m^2/s]
  Ds_pos_discharge = 1.40e-13[m^2/s]
  Ds_neg = 1e-15[m^2/s]
  E_pos_base = 150[GPa]
  E_pos = E_pos_base*modulusScale
  nu_pos_base = 0.3
  nu_pos = nu_pos_base*poissonScale
  beta_pos_base = 0.012
  beta_pos = beta_pos_base*strainScale
  E_neg = 15[GPa]
  nu_neg = 0.25
  beta_neg = 0.025  // Hard-carbon chemical expansion [provisional; inactive in positive-only mechanics]
  E_binder = 0.3[GPa]
  nu_binder = 0.32
  E_separator = 0.35[GPa]
  nu_separator = 0.3
  cl0 = 1[M]
  sigma_l_const = 0.882[S/m]
  Dl = 1.5e-10[m^2/s]
  sigma_binder = 10[S/m]
  tplus = 0.4
  alpha = 0.5
  eps_an = 0.35
  eps_ca = 0.3
  eps_sep = 0.45
  tau_an = 1.69
  tau_ca = 1.83
  tau_sep = 1.49
  i0_pos_base = 5[A/m^2]
  i0_pos = i0_pos_base*positiveKineticsScale
  Capacity = 175[mAh/g]
  Vp_pos = 4*pi*Rp_pos^3/3
  Vneg_total = 2*4*pi*Rp_neg_large^3/3+2*4*pi*Rp_neg_small^3/3
  negativeCapacityRatio = csmax_neg*(1-x_neg_initial)*Vneg_total/(csmax_pos*(x_pos_initial-x_pos_final_nominal)*Vp_pos)  // Available hard-carbon Na inventory / required positive-particle transfer
  totalNaReference = cs0_pos*Vp_pos+cs0_neg*Vneg_total  // Initial active-particle Na inventory; electrolyte contribution is tracked as a change from cl0
  mp_pos = rho_pos*Vp_pos
  Q_pos = mp_pos*Capacity
  I_1C = Q_pos/1[h]
  C_rate = 1.0
  I_app = C_rate*I_1C
  j_app = I_app/A_cell
  N_pos = I_app/(F_const*4*pi*Rp_pos^2)
  N_neg = I_app/(F_const*(2*4*pi*Rp_neg_large^2+2*4*pi*Rp_neg_small^2))
  t_to_nominal_x = (x_pos_initial-x_pos_final_nominal)*F_const*csmax_pos*Vp_pos/I_app  // Reference time to x=0.2; not a stopping condition
  t_nominal = 1.2*max(1[h]/C_rate,t_to_nominal_x)  // Safety horizon; voltage StopCondition determines the actual endpoint
  V_charge_cutoff = 4.3[V]
  V_discharge_cutoff = 2.0[V]
  runDirection = 1  // 1=charge, -1=discharge
  useMeasuredStrain = 0  // Use XRD-derived strain interpolation only when explicitly selected
  quantitativeReady = 0  // 1 only when OCV/mechanics/full-cell inputs and XRD strain are measured
  diffusionChargeScale = 1.0
  diffusionDischargeScale = 1.0
  strainScale = 1.0
  modulusScale = 1.0
  poissonScale = 1.0
  radiusScale = 1.0
  positiveKineticsScale = 1.0
  negativeKineticsScale = 1.0

Functions
  Eeq_pos: Interpolation "插值"
    funcnametable = {Eeq_pos, 1}
    source = file
    filename = /Users/guo/Documents/workspace/Comsol/comsol-na-stress/data/ocv_nfm_template.csv
    filecolumns = 2
    columnKeys = {col1, col2}
    columnType = {col1, arg, col2, value}
    funcnames = {col1, Eeq_pos, col2, Eeq_pos}
    fununit = V
    argunit = 1
    plotfuncname = Eeq_pos
    nargs = 1
  Ds_pos_charge_fun: Interpolation "插值 2"
    funcnametable = {Ds_pos_charge_fun, 1}
    source = file
    filename = /Users/guo/Documents/workspace/Comsol/comsol-na-stress/data/ds_nfm_template.csv
    filecolumns = 2
    columnKeys = {col1, col2}
    columnType = {col1, arg, col2, value}
    funcnames = {col1, Ds_pos_charge_fun, col2, Ds_pos_charge_fun}
    fununit = m^2/s
    argunit = 1
    plotfuncname = Ds_pos_charge_fun
    nargs = 1
  Ds_pos_discharge_fun: Interpolation "插值 3"
    funcnametable = {Ds_pos_discharge_fun, 1}
    source = file
    filename = /Users/guo/Documents/workspace/Comsol/comsol-na-stress/data/ds_nfm_discharge_template.csv
    filecolumns = 2
    columnKeys = {col1, col2}
    columnType = {col1, arg, col2, value}
    funcnames = {col1, Ds_pos_discharge_fun, col2, Ds_pos_discharge_fun}
    fununit = m^2/s
    argunit = 1
    plotfuncname = Ds_pos_discharge_fun
    nargs = 1
  Eeq_neg: Interpolation "插值 4"
    funcnametable = {Eeq_neg, 1}
    source = file
    filename = /Users/guo/Documents/workspace/Comsol/comsol-na-stress/data/ocv_hard_carbon_template.csv
    filecolumns = 2
    columnKeys = {col1, col2}
    columnType = {col1, arg, col2, value}
    funcnames = {col1, Eeq_neg, col2, Eeq_neg}
    fununit = V
    argunit = 1
    plotfuncname = Eeq_neg
    nargs = 1
  i0_neg: Interpolation "插值 5"
    funcnametable = {i0_neg, 1}
    source = file
    filename = /Users/guo/Documents/workspace/Comsol/comsol-na-stress/data/k_hard_carbon_template.csv
    filecolumns = 2
    columnKeys = {col1, col2}
    columnType = {col1, arg, col2, value}
    funcnames = {col1, i0_neg, col2, i0_neg}
    fununit = A/m^2
    argunit = 1
    plotfuncname = i0_neg
    nargs = 1
  Ds_neg_fun: Interpolation "插值 6"
    funcnametable = {Ds_neg_fun, 1}
    source = file
    filename = /Users/guo/Documents/workspace/Comsol/comsol-na-stress/data/ds_hard_carbon_parameters_docx.csv
    filecolumns = 2
    columnKeys = {col1, col2}
    columnType = {col1, arg, col2, value}
    funcnames = {col1, Ds_neg_fun, col2, Ds_neg_fun}
    fununit = m^2/s
    argunit = 1
    plotfuncname = Ds_neg_fun
    nargs = 1
  sigma_l_fun: Interpolation "插值 7"
    funcnametable = {sigma_l_fun, 1}
    source = file
    filename = /Users/guo/Documents/workspace/Comsol/comsol-na-stress/data/electrolyte_conductivity_parameters_docx.csv
    filecolumns = 2
    columnKeys = {col1, col2}
    columnType = {col1, arg, col2, value}
    funcnames = {col1, sigma_l_fun, col2, sigma_l_fun}
    fununit = S/m
    argunit = 1
    plotfuncname = sigma_l_fun
    nargs = 1
  strain_pos_fun: Interpolation "插值 8"
    funcnametable = {strain_pos_fun, 1}
    source = file
    filename = /Users/guo/Documents/workspace/Comsol/comsol-na-stress/data/strain_nfm_template.csv
    filecolumns = 2
    columnKeys = {col1, col2}
    columnType = {col1, arg, col2, value}
    funcnames = {col1, strain_pos_fun, col2, strain_pos_fun}
    fununit = 1
    argunit = 1
    plotfuncname = strain_pos_fun
    nargs = 1

Variables
  positive_variables "变量" on selection positive_particle_domain
    xPos = cPos/csmax_pos  // Positive-particle sodium fraction
    xPosBattery = if(isdefined(cPos),cPos/csmax_pos,x_pos_initial)
    DsPos = (if(runDirection>0,Ds_pos_charge,Ds_pos_discharge))*if(runDirection>0,diffusionChargeScale,diffusionDischargeScale)
    epsilonChemPos = if(useMeasuredStrain>0.5,strain_pos_fun(xPos),beta_pos*(xPos-x_pos_initial))
  positive_surface_variables "变量 2" on selection positive_particle_surface
    positiveNaFlux = -liion.ies_pos.er1.iloc/F_const  // Local Butler-Volmer current converted to Na molar flux
  negative_variables "变量 3" on selection negative_particle_domains
    xNeg = cNeg/csmax_neg  // Hard-carbon sodium fraction
    xNegBattery = if(isdefined(cNeg),cNeg/csmax_neg,x_neg_initial)
    DsNegEffective = Ds_neg_fun(xNeg)
  negative_surface_variables "变量 4" on selection negative_particle_surfaces
    negativeNaFlux = -liion.ies_neg.er1.iloc/F_const  // Local Butler-Volmer current converted to Na molar flux
  cell_metrics "变量 5"
    cellVoltage = ave_positive_collector(phis)-ave_negative_collector(phis)  // Terminal voltage
    cellCapacity = abs(I_app*t)/3600/1[mAh]  // Transferred cell capacity
    positiveInventory = ave_pos(cPos)*Vp_pos  // Positive-particle Na inventory proxy
    negativeInventory = ave_neg(cNeg)*(2*4*pi*Rp_neg_large^3/3+2*4*pi*Rp_neg_small^3/3)
    electrolyteInventoryChange = eps_an*int_an_electrolyte(cl-cl0)+eps_sep*int_sep_electrolyte(cl-cl0)+eps_ca*int_ca_electrolyte(cl-cl0)  // Electrolyte Na inventory change relative to the uniform initial salt concentration
    totalNaInventory = positiveInventory+negativeInventory+electrolyteInventoryChange

Selections
  negative_particle_domains: Union "并集"
    entitydim = 3
    input = {geom_full_hc_1_dom, geom_full_hc_2_dom, geom_full_hc_3_dom, geom_full_hc_4_dom}
  positive_particle_domain: Union "并集 2" | entitydim = 3; input = {geom_full_positive_particle_dom}
  anode_matrix_domain: Difference "差集"
    entitydim = 3
    add = {geom_full_anode_block_dom}
    subtract = {negative_particle_domains}
  separator_domain: Union "并集 3" | entitydim = 3; input = {geom_full_separator_block_dom}
  cathode_matrix_domain: Difference "差集 2"
    entitydim = 3
    add = {geom_full_cathode_block_dom}
    subtract = {positive_particle_domain}
  binder_domains: Union "并集 4" | entitydim = 3; input = {anode_matrix_domain, cathode_matrix_domain}
  full_cell_domains: Union "并集 5"
    entitydim = 3
    input = {anode_matrix_domain, separator_domain, cathode_matrix_domain, negative_particle_domains, positive_particle_domain}
  electrolyte_domains: Union "并集 6"
    entitydim = 3
    input = {anode_matrix_domain, separator_domain, cathode_matrix_domain}
  negative_particle_surfaces: Adjacent "相邻" | entitydim = 3; input = {negative_particle_domains}; outputdim = 2
  positive_particle_surface: Adjacent "相邻 2" | entitydim = 3; input = {positive_particle_domain}; outputdim = 2
  negative_collector_boundary: Box "框"
    entitydim = 2
    xmin = -1e-12
    xmax = 1e-12
    ymin = -1e-12
    ymax = W_cell+1e-12
    zmin = -1e-12
    zmax = H_cell+1e-12
    condition = inside
  positive_collector_boundary: Box "框 2"
    entitydim = 2
    xmin = L_total-1e-12
    xmax = L_total+1e-12
    ymin = -1e-12
    ymax = W_cell+1e-12
    zmin = -1e-12
    zmax = H_cell+1e-12
    condition = inside
  side_y0: Box "框 3"
    entitydim = 2
    xmin = -1e-12
    xmax = L_total+1e-12
    ymin = -1e-12
    ymax = 1e-12
    zmin = -1e-12
    zmax = H_cell+1e-12
    condition = inside
  side_y1: Box "框 1"
    entitydim = 2
    xmin = -1e-12
    xmax = L_total+1e-12
    ymin = W_cell-1e-12
    ymax = W_cell+1e-12
    zmin = -1e-12
    zmax = H_cell+1e-12
    condition = inside
  side_z0: Box "框 4"
    entitydim = 2
    xmin = -1e-12
    xmax = L_total+1e-12
    ymin = -1e-12
    ymax = W_cell+1e-12
    zmin = -1e-12
    zmax = 1e-12
    condition = inside
  side_z1: Box "框 1a"
    entitydim = 2
    xmin = -1e-12
    xmax = L_total+1e-12
    ymin = -1e-12
    ymax = W_cell+1e-12
    zmin = H_cell-1e-12
    zmax = H_cell+1e-12
    condition = inside
  lateral_boundaries: Union "并集 7" | entitydim = 2; input = {side_y0, side_y1, side_z0, side_z1}

Couplings
  ave_pos: Average "平均值" on selection positive_particle_domain
  max_pos: Maximum "最大值" on selection positive_particle_domain
  ave_pos_surface: Average "平均值 2" on selection positive_particle_surface
  ave_neg: Average "平均值 3" on selection negative_particle_domains
  ave_electrolyte: Average "平均值 4" on selection electrolyte_domains
  int_an_electrolyte: Integration "积分" on selection anode_matrix_domain
  int_sep_electrolyte: Integration "积分 2" on selection separator_domain
  int_ca_electrolyte: Integration "积分 3" on selection cathode_matrix_domain
  ave_positive_collector: Average "平均值 5" on selection positive_collector_boundary
  ave_negative_collector: Average "平均值 6" on selection negative_collector_boundary

Geometry
  geom_full "几何" (3D, length unit m)
    anode_block: Block "长方体" | size = {L_an, W_cell, H_cell}
    separator_block: Block "长方体 2" | size = {L_sep, W_cell, H_cell}; pos = {L_an, 0, 0}
    cathode_block: Block "长方体 3" | size = {L_ca, W_cell, H_cell}; pos = {L_an+L_sep, 0, 0}
    hc_1: Sphere "球体 1" | r = Rp_neg_large; pos = {x_hc_1, y_hc_1, z_hc_1}
    hc_2: Sphere "球体 2" | r = Rp_neg_large; pos = {x_hc_2, y_hc_2, z_hc_2}
    hc_3: Sphere "球体 3" | r = Rp_neg_small; pos = {x_hc_3, y_hc_3, z_hc_3}
    hc_4: Sphere "球体 4" | r = Rp_neg_small; pos = {x_hc_4, y_hc_4, z_hc_4}
    positive_particle: Sphere "球体" | r = Rp_pos; pos = {L_an+L_sep+L_ca/2, W_cell/2, H_cell/2}
    fin: Finalize "形成联合体"

Physics
  liion: LithiumIonBatteryMPH "锂离子电池" on selection electrolyte_domains
    dependent variable phil
    sep1: Separator "隔膜 1" (default)
      sigmal_mat = userdef
      sigmal = sigma_l_fun(cl/1[kmol/m^3])
      Dl_mat = userdef
      Dl = Dl
      transpNum_mat = userdef
      transpNum = tplus
      fcl_mat = userdef
      fcl = 1
      epsl = eps_sep
      taul = tau_sep
    nf1: NoFlux "无通量 1" (default)
    ins1: Insulation "绝缘 1" (default)
    init1: init "初始值 1" (default) | cl = cl0
    pcb_neg: PorousConductiveBinder "多孔导电黏合剂" on selection anode_matrix_domain
      sigmal_mat = userdef
      sigmal = sigma_l_fun(cl/1[kmol/m^3])
      Dl_mat = userdef
      Dl = Dl
      transpNum_mat = userdef
      transpNum = tplus
      fcl_mat = userdef
      fcl = 1
      sigma_mat = userdef
      sigma = sigma_binder
      Tref_mat = userdef
      Tref = 293.15[K]
      alpha_mat = userdef
      alpha = 0
      rho0_mat = userdef
      rho0 = 0
      epsl = eps_an
      taul = tau_an
      AddVolumeChangeToElectrodeVolumeFraction = 0
      SubtractVolumeChangeFromElectrolyteVolumeFraction = 0
    pcb_pos: PorousConductiveBinder "多孔导电黏合剂 2" on selection cathode_matrix_domain
      sigmal_mat = userdef
      sigmal = sigma_l_fun(cl/1[kmol/m^3])
      Dl_mat = userdef
      Dl = Dl
      transpNum_mat = userdef
      transpNum = tplus
      fcl_mat = userdef
      fcl = 1
      sigma_mat = userdef
      sigma = sigma_binder
      Tref_mat = userdef
      Tref = 293.15[K]
      alpha_mat = userdef
      alpha = 0
      rho0_mat = userdef
      rho0 = 0
      epsl = eps_ca
      taul = tau_ca
      AddVolumeChangeToElectrodeVolumeFraction = 0
      SubtractVolumeChangeFromElectrolyteVolumeFraction = 0
    ies_neg: InternalElectrodeSurface "内部电极表面" on selection negative_particle_surfaces
      SolveForDissolvingDepositingConcentrationVariable = 0
      er1: ElectrodeReaction "电极反应 1" (default)
        Eeq_mat = userdef
        Eeq = Eeq_neg(xNegBattery)
        ElectrodeKinetics = LithiumInsertion
        cEeqref_mat = userdef
        cEeqref = csmax_neg
        i0 = i0_neg(xNegBattery)*negativeKineticsScale
        dEeqdT_mat = userdef
        dEeqdT = 0
        minput_concentration = cNeg
    ies_pos: InternalElectrodeSurface "内部电极表面 2" on selection positive_particle_surface
      SolveForDissolvingDepositingConcentrationVariable = 0
      er1: ElectrodeReaction "电极反应 1" (default)
        Eeq_mat = userdef
        Eeq = Eeq_pos(xPosBattery)
        ElectrodeKinetics = LithiumInsertion
        cEeqref_mat = userdef
        cEeqref = csmax_pos
        i0 = i0_pos
        dEeqdT_mat = userdef
        dEeqdT = 0
        minput_concentration = cPos
    ground_neg: ElectricGround "电接地" on selection negative_collector_boundary
    current_pos: ElectrodeCurrent "电极电流" on selection positive_collector_boundary
      ElectronicCurrentType = AverageCurrentDensity
      Ias = runDirection*j_app
  cNa_positive: CoefficientFormPDE "系数形式偏微分方程" on selection positive_particle_domain
    dependent variable cPos
    Units.DependentVariableQuantity = concentration
    cfeq1: CoefficientFormPDE "系数形式偏微分方程 1" (default) | c = DsPos; a = 0; f = 0; da = 1
    zflx1: ZeroFluxBoundary "零通量 1" (default)
    init1: init "初始值 1" (default) | cPos = cs0_pos
    surface_flux: FluxBoundary "通量/源" on selection positive_particle_surface | g = positiveNaFlux; q = 0
  cNa_negative: CoefficientFormPDE "系数形式偏微分方程 2" on selection negative_particle_domains
    dependent variable cNeg
    Units.DependentVariableQuantity = concentration
    cfeq1: CoefficientFormPDE "系数形式偏微分方程 1" (default) | c = DsNegEffective; a = 0; f = 0; da = 1
    zflx1: ZeroFluxBoundary "零通量 1" (default)
    init1: init "初始值 1" (default) | cNeg = cs0_neg
    surface_flux: FluxBoundary "通量/源" on selection negative_particle_surfaces | g = negativeNaFlux; q = 0
  solid_full: SolidMechanics "固体力学" on selection positive_particle_domain
    dependent variable u = {u, v, w}
    lemm1: LinearElasticModel "线弹性材料 1" (default)
      E_mat = userdef
      E = E_pos
      nu_mat = userdef
      nu = nu_pos
      rho_mat = userdef
      rho = 0
      chemical_strain: ExternalStrain "外部应变" on all domains
        StrainInput = StrainTensor
        eext_src = userdef
        eext = epsilonChemPos
    free1: Free "自由 1" (default)
    init1: init "初始值 1" (default)
    rigid_motion_suppression: RigidMotionSuppression "刚体运动抑制" on selection positive_particle_domain

Mesh
  mesh_full "网格"
    size: MeshSizeDefault "大小" | hmax = 1.8E-6; hmin = 3.24E-7; hcurve = 0.6; hnarrow = 0.5; hgrad = 1.5
    size_global: Size "大小 2" on selection full_cell_domains | hmax = 3[um]; hmin = 0.5[um]; hgrad = 1.25; custom = on
    size_particles: Size "大小 3" on selection positive_particle_domain | hmax = 1.5[um]; hmin = 0.4[um]; custom = on
    size_interfaces: Size "大小 4" on selection positive_particle_surface | hmax = 1.25[um]; custom = on
    free_tet: FreeTet "自由四面体网格" on selection full_cell_domains

Studies
  study_full_init "Current distribution initialization"
  study_full_charge "Charge 2.7-4.3 V"
    cdi: CurrentDistributionInitialization "电流分布初始化" | solve for = {liion, comp_full}
    time: Transient "瞬态"
      tlist = 0.0*t_nominal 0.2*t_nominal 0.4*t_nominal 0.5*t_nominal 0.6*t_nominal 0.8*t_nominal 1.0*t_nominal
      usertol = on
  study_full_discharge "Discharge 4.3-2.0 V"
    time: Transient "瞬态"
      tlist = 0.0*t_nominal 0.2*t_nominal 0.4*t_nominal 0.5*t_nominal 0.6*t_nominal 0.8*t_nominal 1.0*t_nominal
      usertol = on

Datasets
  positive_radial_cutline: CutLine3D "三维截线"
    genpoints = 
      {x_pos_center, y_pos_center, z_pos_center}
      {x_pos_center+Rp_pos, y_pos_center, z_pos_center}

Plots
  full_concentration: PlotGroup3D "Positive-particle Na fraction [PROVISIONAL]" | data = positive_radial_cutline
    volume: Volume "体" | expr = xPos; unit = 1
  full_stress: PlotGroup3D "Positive-particle von Mises stress [PROVISIONAL]" | data = positive_radial_cutline
    volume: Volume "体" | expr = solid.mises; unit = MPa
  full_electrolyte: PlotGroup3D "Electrolyte Na-salt concentration [PROVISIONAL]" | data = positive_radial_cutline
    volume: Volume "体" | expr = cl; unit = mol/m^3
  full_electrolyte_potential: PlotGroup3D "Electrolyte potential [PROVISIONAL]" | data = positive_radial_cutline
    volume: Volume "体" | expr = phil; unit = V
  full_solid_potential: PlotGroup3D "Solid-phase potential [PROVISIONAL]" | data = positive_radial_cutline
    volume: Volume "体" | expr = phis; unit = V